# =============================================================================
# =============================================================================
#
# Creates a Dilute Initial Water Ion Structure (PBC) & Relax Overlap
# Written By: Amro Dodin
#
# =============================================================================
# =============================================================================

include parameters.lmp
include parse_model.lmp

log ${DATADIR}/init/init.${label}.log

# =============================================================================
# Create Simulation Box
# =============================================================================

boundary p p p
units real
lattice sc $a

atom_style full
region box block -${Lxy} ${Lxy} -${Lxy} ${Lxy} -$D $D units lattice
create_box ${atomTypes} box bond/types ${bondTypes} angle/types ${angleTypes} &
    dihedral/types ${dihedralTypes} improper/types ${improperTypes} &
    extra/bond/per/atom ${bondsPerAtom} extra/angle/per/atom ${anglesPerAtom} &
    extra/dihedral/per/atom ${dihedralsPerAtom} &
    extra/improper/per/atom ${impropersPerAtom} &
    extra/special/per/atom ${specialsPerAtom}

# =============================================================================
# Randomly Place Water & Ions
# =============================================================================

# Create Water
if "${BC} == box" then &
    "region water_box block EDGE EDGE EDGE EDGE EDGE EDGE units lattice" &
else &
    "region water_box block EDGE EDGE EDGE EDGE -${Lz} ${Lz} units lattice"

if "(${numWaters} != 0) && (${initialConfig} == False)" then &
    "print 'WARNING: Using random initial configuration of water. Consider providing initialConfig (.xyz) file'"

if "${numWaters} == 0" then &
    "create_atoms 0 region water_box mol h2o $S" &
else &
    "create_atoms 0 random ${numWaters} $S water_box mol h2o $S units lattice"

# Create Cations
if  "${cationMolecular} == True" then &
    "create_atoms 0 random ${numCations} $S water_box mol cation $S units lattice" &
else &
    "create_atoms ${cationType} random ${numCations} $S water_box overlap ${cationOverlap} maxtry 100000 units lattice" &

# Create Anions
if  "${anionMolecular} == True" then &
    "create_atoms 0 random ${numAnions} $S water_box mol anion $S units lattice" &
else &
    "create_atoms ${anionType} random ${numAnions} $S water_box overlap ${anionOverlap} maxtry 1000000 units lattice" &


#read_dump mixture.20.xyz 0 x y z box no format xyz

# =============================================================================
# Relax Overlap
# =============================================================================
#mass * 1.0

# Import Minimization Force Field
include ${FFDIR}ff.min.${FFLabel}.lmp

# Add Boundary Conditions
if "${BC} == wall" then &
    "change_box all boundary p p f" &
    "fix wall all wall/lj126 zlo EDGE 0.1 ${ljRAu} 12.0 zhi EDGE 0.1 ${ljRAu} 12.0 units box" &
elif "(${BC} == electrode) || (${BC} == insulator)" &
    "# Update Lattice" &
    "lattice fcc ${aAu}" &
    "# Create On Lattice Electrode Regions" &
    "region rleft block EDGE EDGE EDGE EDGE -${Ezext} -${Ezint} units lattice" &
    "region rright block EDGE EDGE EDGE EDGE ${Ezint} ${Ezext} units lattice" &
    "create_atoms ${BCType} region rleft" &
    "create_atoms ${BCType} region rright" &
    "# Displace Electrodes to target Locations" &
    "group eleft region rleft" &
    "group eright region rright" &
    "group electrodes union eleft eright" &
    "displace_atoms eleft move 0 0 ${Ezdisp} units lattice" &
    "displace_atoms eright move 0 0 -${Ezdisp} units lattice" &
    "fix freeze electrodes setforce 0 0 0" &
    "change_box all z final -${Dint} ${Dint}" &
elif "(${BC} == step_electrode)" &
    "# Update Lattice" &
    "lattice fcc ${aAu}" &
    "# Create On Lattice Electrode Regions" &
    "region rleft1 block EDGE EDGE EDGE EDGE -${Ezext} -${Ezint} units lattice" &
    "region sleft block EDGE 0 EDGE EDGE -${Ezint} -${Ezstep} units lattice" &
    "region rleft union 2 rleft1 sleft" &
    "region rright1 block EDGE EDGE EDGE EDGE ${Ezint} ${Ezext} units lattice" &
    "region sright block EDGE 0 EDGE EDGE ${Ezint} ${Ezcut} units lattice side out" &
    "region rright intersect 2 rright1 sright" &
    "create_atoms ${BCType} region rleft" &
    "create_atoms ${BCType} region rright" &
    "# Displace Electrodes to target Locations" &
    "group eleft region rleft" &
    "group eright region rright" &
    "group electrodes union eleft eright" &
    "displace_atoms eleft move 0 0 ${Ezdisp} units lattice" &
    "displace_atoms eright move 0 0 -${Ezdisp} units lattice" &
    "fix freeze electrodes setforce 0 0 0" &
    "change_box all z final -${Dint} ${Dint}"

# Rebalance processors (mostly for slab simulations w/z vacuum)
balance 1.2 shift z 5 1.0

thermo_style custom step pe density fmax fnorm
thermo 10

dump 1 all atom ${minEvery} ${DATADIR}/init/init.${label}.lammpstrj

minimize 0 0 ${numMin} ${numMinEval}

# =============================================================================
# Save Data Output
# =============================================================================
if "${cationMolecular}==True && ${anionMolecular}==False" then &
    "set type ${anionType} charge -${qAnion}" &
elif "${cationMolecular}==False && ${anionMolecular}==True" &
    "set type ${cationType} charge ${qCation}" &
else &
    "set type ${anionType} charge -${qAnion}" &
    "set type ${cationType} charge ${qCation}"

write_data ${DATADIR}/init/data.${label}.init
